TOL := 10^-9
f(x, y) := ((x + 5)/4)^2 + y^2 - 8
# [component: inputs f]
h(x, y) := y + 8*x
x := 0.86
y := -0.03
f(x, y) = -5.85287
d/dx(f(x, y)) = 0.7325
d/dy(f(x, y)) = -0.06
h(x, y) = 6.85
d/dx(h(x, y)) = 8
d/dy(h(x, y)) = 1
Given
f(x, y) == 0
h(x, y) == 0
Find(x, y) = [0.312158; -2.49726]
